// SBML level 2 version 1

model IFN_alpha_altSOCS_ppCompatible()

  // Compartments:
  compartment default1 = 1;

  // Species:
  species __s0 in default1 = 6022000000/default1; __s0 is "IFN_alpha2(r1=None, r2=None)";
  species __s1 in default1 = 2000/default1; __s1 is "IFNAR1(re=None, ri=None, loc='out')";
  species __s2 in default1 = 2000/default1; __s2 is "IFNAR2(re=None, ri=None, loc='out')";
  species __s3 in default1 = 10000/default1; __s3 is "STAT(j='U', loc='Cyt', fdbk=None)";
  species __s4 in default1 = 0; __s4 is "IFNAR1(re=1, ri=None, loc='out') ._br_IFN_alpha2(r1=1, r2=None)";
  species __s5 in default1 = 0; __s5 is "IFNAR2(re=1, ri=None, loc='out') ._br_IFN_alpha2(r1=1, r2=None)";
  species __s6 in default1 = 0; __s6 is "IFNAR1(re=1, ri=None, loc='out') ._br_IFNAR2(re=2, ri=None, loc='out') ._br_IFN_alpha2(r1=1, r2=2)";
  species __s7 in default1 = 0; __s7 is "STAT(j='P', loc='Cyt', fdbk=None)";
  species __s8 in default1 = 0; __s8 is "SOCS(site=None)";
  species __s9 in default1 = 0; __s9 is "IFNAR2(re=None, ri=1, loc='out') ._br_SOCS(site=1)";
  species __s10 in default1 = 0; __s10 is "IFNAR2(re=1, ri=2, loc='out') ._br_IFN_alpha2(r1=1, r2=None) ._br_SOCS(site=2)";
  species __s11 in default1 = 0; __s11 is "IFNAR1(re=1, ri=None, loc='out') ._br_IFNAR2(re=2, ri=3, loc='out') ._br_IFN_alpha2(r1=1, r2=2) ._br_SOCS(site=3)";

  // Parameters:
  ka1 = 3.321156e-14;
  kd1 = 1;
  ka2 = 4.981734e-13;
  kd2 = 0.015;
  ka4 = 0.0003623188;
  kd4 = 0.3;
  ka3 = 0.0003623188;
  kd3 = 0.0003;
  kpa = 1e-6;
  kpu = 0.001;
  kSOCS = 0.004;
  SOCSdeg = 0.0025;
  kSOCSon = 1e-6;
  kSOCSoff = 0.00055;

  // Reactions:
  r0: __s0 + __s1 -> __s4; __s0*__s1*ka1 - __s4*kd1;
  r1: __s0 + __s2 -> __s5; __s0*__s2*ka2 - __s5*kd2;
  r2: __s2 + __s4 -> __s6; __s2*__s4*ka3 - __s6*kd3;
  r3: __s1 + __s5 -> __s6; __s1*__s5*ka4 - __s6*kd4;
  r4: __s3 + __s6 => __s6 + __s7; __s3*__s6*kpa;
  r5: __s7 => __s3; __s7*kpu;
  r6: __s7 => __s7 + __s8; __s7*kSOCS;
  r7: __s8 => ; __s8*SOCSdeg;
  r8: __s2 + __s8 -> __s9; __s2*__s8*kSOCSon - __s9*kSOCSoff;
  r9: __s5 + __s8 -> __s10; -(__s10*kSOCSoff) + __s5*__s8*kSOCSon;
  r10: __s6 + __s8 -> __s11; -(__s11*kSOCSoff) + __s6*__s8*kSOCSon;
  r11: __s0 + __s9 -> __s10; __s0*__s9*ka2 - __s10*kd2;
  r12: __s4 + __s9 -> __s11; -(__s11*kd3) + __s4*__s9*ka3;
  r13: __s1 + __s10 -> __s11; __s1*__s10*ka4 - __s11*kd4;
end
