// SBML level 2 version 1

model Mixed_IFN_detailed()

  // Compartments:
  compartment default1 = 1;

  // Species:
  species __s0 in default1 = 6022000000/default1; __s0 is "IFN_alpha2(r1=None, r2=None)";
  species __s1 in default1 = 6022000000/default1; __s1 is "IFN_beta(r1=None, r2=None)";
  species __s2 in default1 = 2000/default1; __s2 is "IFNAR1(re=None, ri=None, loc='out')";
  species __s3 in default1 = 2000/default1; __s3 is "IFNAR2(re=None, ri=None, rs=None, loc='out')";
  species __s4 in default1 = 10000/default1; __s4 is "STAT(j='U', loc='Cyt', fdbk=None)";
  species __s5 in default1 = 0; __s5 is "STAT(j='P', loc='Cyt', fdbk=None)";
  species __s6 in default1 = 0; __s6 is "IFNAR1(re=1, ri=None, loc='out') ._br_IFN_alpha2(r1=1, r2=None)";
  species __s7 in default1 = 0; __s7 is "IFNAR2(re=1, ri=None, rs=None, loc='out') ._br_IFN_alpha2(r1=1, r2=None)";
  species __s8 in default1 = 0; __s8 is "IFNAR1(re=1, ri=None, loc='out') ._br_IFN_beta(r1=1, r2=None)";
  species __s9 in default1 = 0; __s9 is "IFNAR2(re=1, ri=None, rs=None, loc='out') ._br_IFN_beta(r1=1, r2=None)";
  species __s10 in default1 = 0; __s10 is "STAT(j='P', loc='Nuc', fdbk=None)";
  species __s11 in default1 = 0; __s11 is "IFNAR1(re=None, ri=None, loc='in')";
  species __s12 in default1 = 0; __s12 is "IFNAR2(re=None, ri=None, rs=None, loc='in')";
  species __s13 in default1 = 0; __s13 is "IFNAR1(re=1, ri=None, loc='out') ._br_IFNAR2(re=2, ri=None, rs=None, loc='out') ._br_IFN_alpha2(r1=1, r2=2)";
  species __s14 in default1 = 0; __s14 is "IFNAR1(re=1, ri=None, loc='out') ._br_IFNAR2(re=2, ri=None, rs=None, loc='out') ._br_IFN_beta(r1=1, r2=2)";
  species __s15 in default1 = 0; __s15 is "SOCSmRNA(loc='Nuc', reg=None)";
  species __s16 in default1 = 0; __s16 is "IFNAR1(re=1, ri=None, loc='out') ._br_IFNAR2(re=2, ri=None, rs=3, loc='out') ._br_IFN_alpha2(r1=1, r2=2) ._br_STAT(j='U', loc='Cyt', fdbk=3)";
  species __s17 in default1 = 0; __s17 is "IFNAR1(re=1, ri=None, loc='out') ._br_IFNAR2(re=2, ri=None, rs=3, loc='out') ._br_IFN_beta(r1=1, r2=2) ._br_STAT(j='U', loc='Cyt', fdbk=3)";
  species __s18 in default1 = 0; __s18 is "SOCSmRNA(loc='Cyt', reg=None)";
  species __s19 in default1 = 0; __s19 is "IFNAR1(re=1, ri=None, loc='in') ._br_IFNAR2(re=2, ri=None, rs=None, loc='in') ._br_IFN_alpha2(r1=1, r2=2)";
  species __s20 in default1 = 0; __s20 is "IFNAR1(re=1, ri=None, loc='in') ._br_IFNAR2(re=2, ri=None, rs=None, loc='in') ._br_IFN_beta(r1=1, r2=2)";
  species __s21 in default1 = 0; __s21 is "SOCS(site=None)";
  species __s22 in default1 = 0; __s22 is "IFNAR2(re=None, ri=1, rs=None, loc='out') ._br_SOCS(site=1)";
  species __s23 in default1 = 0; __s23 is "IFNAR2(re=1, ri=2, rs=None, loc='out') ._br_IFN_alpha2(r1=1, r2=None) ._br_SOCS(site=2)";
  species __s24 in default1 = 0; __s24 is "IFNAR2(re=1, ri=2, rs=None, loc='out') ._br_IFN_beta(r1=1, r2=None) ._br_SOCS(site=2)";
  species __s25 in default1 = 0; __s25 is "IFNAR1(re=1, ri=None, loc='out') ._br_IFNAR2(re=2, ri=3, rs=None, loc='out') ._br_IFN_alpha2(r1=1, r2=2) ._br_SOCS(site=3)";
  species __s26 in default1 = 0; __s26 is "IFNAR1(re=1, ri=None, loc='out') ._br_IFNAR2(re=2, ri=3, rs=None, loc='out') ._br_IFN_beta(r1=1, r2=2) ._br_SOCS(site=3)";

  // Parameters:
  ka1 = 3.321156e-14;
  kd1 = 1;
  ka2 = 4.981734e-13;
  kd2 = 0.015;
  ka4 = 0.0003623188;
  kd4 = 0.3;
  ka3 = 0.0003623188;
  kd3 = 0.0003;
  k_a1 = 4.98e-14;
  k_d1 = 0.03;
  k_a2 = 8.3e-13;
  k_d2 = 0.002;
  k_a3 = 0.000362;
  k_d3 = 2.4e-5;
  k_a4 = 0.000362;
  k_d4 = 0.006;
  kIntBasal_r1 = 0.0001;
  kIntBasal_r2 = 2e-5;
  krec_r1 = 0.0001;
  krec_r2 = 0.0001;
  kint_a = 0.0005;
  kint_b = 0.0002;
  kdeg_a = 0.0008;
  kdeg_b = 0.0008;
  krec_a1 = 0.0003;
  krec_a2 = 0.005;
  kSTATbinding = 1e-6;
  kSTATunbinding = 4;
  kpa = 1;
  kpu = 0.001;
  kloc = 0.00125;
  kdeloc = 0.01;
  kSOCSmRNA = 0.001;
  mRNAtrans = 0.001;
  kSOCS = 0.005;
  kSOCSon = 0.001;
  kSOCSoff = 0.0005;

  // Reactions:
  r0: __s0 + __s2 -> __s6; __s0*__s2*ka1 - __s6*kd1;
  r1: __s0 + __s3 -> __s7; __s0*__s3*ka2 - __s7*kd2;
  r2: __s1 + __s2 -> __s8; __s1*__s2*k_a1 - __s8*k_d1;
  r3: __s1 + __s3 -> __s9; __s1*__s3*k_a2 - __s9*k_d2;
  r4: __s5 => __s4; __s5*kpu;
  r5: __s5 -> __s10; -(__s10*kdeloc) + __s5*kloc;
  r6: __s2 -> __s11; -(2*__s11*krec_a1) - __s11*krec_r1 + __s2*kIntBasal_r1;
  r7: __s3 -> __s12; -(2*__s12*krec_a2) - __s12*krec_r2 + __s3*kIntBasal_r2;
  r8: __s3 + __s6 -> __s13; -(__s13*kd3) + __s3*__s6*ka3;
  r9: __s2 + __s7 -> __s13; -(__s13*kd4) + __s2*__s7*ka4;
  r10: __s3 + __s8 -> __s14; -(__s14*k_d3) + __s3*__s8*k_a3;
  r11: __s2 + __s9 -> __s14; -(__s14*k_d4) + __s2*__s9*k_a4;
  r12: __s10 => __s10 + __s15; __s10*kSOCSmRNA;
  r13: __s4 + __s13 -> __s16; __s13*__s4*kSTATbinding - __s16*kSTATunbinding;
  r14: __s4 + __s14 -> __s17; __s14*__s4*kSTATbinding - __s17*kSTATunbinding;
  r15: __s15 => __s18; __s15*mRNAtrans;
  r16: __s13 => __s19; __s13*kint_a;
  r17: __s14 => __s20; __s14*kint_b;
  r18: __s16 => __s5 + __s13; __s16*kpa;
  r19: __s17 => __s5 + __s14; __s17*kpa;
  r20: __s18 => __s18 + __s21; __s18*kSOCS;
  r21: __s20 => __s11 + __s12; __s20*kdeg_b;
  r22: __s19 => __s11 + __s12; __s19*kdeg_a;
  r23: __s3 + __s21 -> __s22; __s21*__s3*kSOCSon - __s22*kSOCSoff;
  r24: __s7 + __s21 -> __s23; __s21*__s7*kSOCSon - __s23*kSOCSoff;
  r25: __s9 + __s21 -> __s24; __s21*__s9*kSOCSon - __s24*kSOCSoff;
  r26: __s13 + __s21 -> __s25; __s13*__s21*kSOCSon - __s25*kSOCSoff;
  r27: __s14 + __s21 -> __s26; __s14*__s21*kSOCSon - __s26*kSOCSoff;
  r28: __s0 + __s22 -> __s23; __s0*__s22*ka2 - __s23*kd2;
  r29: __s1 + __s22 -> __s24; __s1*__s22*k_a2 - __s24*k_d2;
  r30: __s6 + __s22 -> __s25; __s22*__s6*ka3 - __s25*kd3;
  r31: __s2 + __s23 -> __s25; __s2*__s23*ka4 - __s25*kd4;
  r32: __s2 + __s24 -> __s26; __s2*__s24*k_a4 - __s26*k_d4;
end
