// SBML level 2 version 1

model Mixed_IFN_ppCompatible()

  // Compartments:
  compartment default1 = 1;

  // Species:
  species __s0 in default1 = 6022000000/default1; __s0 is "IFN_alpha2(r1=None, r2=None)";
  species __s1 in default1 = 6022000000/default1; __s1 is "IFN_beta(r1=None, r2=None)";
  species __s2 in default1 = 2000/default1; __s2 is "IFNAR1(re=None, ri=None, loc='out')";
  species __s3 in default1 = 2000/default1; __s3 is "IFNAR2(re=None, ri=None, loc='out')";
  species __s4 in default1 = 10000/default1; __s4 is "STAT(j='U', loc='Cyt', fdbk=None)";
  species __s5 in default1 = 0; __s5 is "STAT(j='P', loc='Cyt', fdbk=None)";
  species __s6 in default1 = 1/default1; __s6 is "SOCS(site=None)";
  species __s7 in default1 = 0; __s7 is "IFNAR1(re=1, ri=None, loc='out') ._br_IFN_alpha2(r1=1, r2=None)";
  species __s8 in default1 = 0; __s8 is "IFNAR2(re=1, ri=None, loc='out') ._br_IFN_alpha2(r1=1, r2=None)";
  species __s9 in default1 = 0; __s9 is "IFNAR1(re=1, ri=None, loc='out') ._br_IFN_beta(r1=1, r2=None)";
  species __s10 in default1 = 0; __s10 is "IFNAR2(re=1, ri=None, loc='out') ._br_IFN_beta(r1=1, r2=None)";
  species __s11 in default1 = 0; __s11 is "IFNAR2(re=None, ri=1, loc='out') ._br_SOCS(site=1)";
  species __s12 in default1 = 0; __s12 is "IFNAR1(re=None, ri=None, loc='in')";
  species __s13 in default1 = 0; __s13 is "IFNAR2(re=None, ri=None, loc='in')";
  species __s14 in default1 = 0; __s14 is "IFNAR2(re=1, ri=2, loc='out') ._br_IFN_alpha2(r1=1, r2=None) ._br_SOCS(site=2)";
  species __s15 in default1 = 0; __s15 is "IFNAR2(re=1, ri=2, loc='out') ._br_IFN_beta(r1=1, r2=None) ._br_SOCS(site=2)";
  species __s16 in default1 = 0; __s16 is "IFNAR1(re=1, ri=None, loc='out') ._br_IFNAR2(re=2, ri=None, loc='out') ._br_IFN_alpha2(r1=1, r2=2)";
  species __s17 in default1 = 0; __s17 is "IFNAR1(re=1, ri=None, loc='out') ._br_IFNAR2(re=2, ri=3, loc='out') ._br_IFN_alpha2(r1=1, r2=2) ._br_SOCS(site=3)";
  species __s18 in default1 = 0; __s18 is "IFNAR1(re=1, ri=None, loc='out') ._br_IFNAR2(re=2, ri=None, loc='out') ._br_IFN_beta(r1=1, r2=2)";
  species __s19 in default1 = 0; __s19 is "IFNAR1(re=1, ri=None, loc='out') ._br_IFNAR2(re=2, ri=3, loc='out') ._br_IFN_beta(r1=1, r2=2) ._br_SOCS(site=3)";
  species __s20 in default1 = 0; __s20 is "IFNAR1(re=1, ri=None, loc='in') ._br_IFNAR2(re=2, ri=None, loc='in') ._br_IFN_alpha2(r1=1, r2=2)";
  species __s21 in default1 = 0; __s21 is "IFNAR1(re=1, ri=None, loc='in') ._br_IFNAR2(re=2, ri=None, loc='in') ._br_IFN_beta(r1=1, r2=2)";

  // Parameters:
  ka1 = 3.321156e-14;
  kd1 = 1;
  ka2 = 4.981734e-13;
  kd2 = 0.015;
  ka4 = 0.0003623188;
  kd4 = 0.3;
  ka3 = 0.0003623188;
  kd3 = 0.0003;
  k_a1 = 4.98e-14;
  k_d1 = 0.03;
  k_a2 = 8.3e-13;
  k_d2 = 0.002;
  k_a3 = 0.000362;
  k_d3 = 2.4e-5;
  k_a4 = 0.000362;
  k_d4 = 0.006;
  kpa = 1e-6;
  kpu = 0.001;
  kIntBasal_r1 = 0.0001;
  kIntBasal_r2 = 2e-5;
  krec_r1 = 0.0001;
  krec_r2 = 0.0001;
  kdeg_a = 0.0008;
  kdeg_b = 0.0008;
  kint_a = 0.0005;
  kint_b = 0.0002;
  krec_a1 = 0.0003;
  krec_a2 = 0.005;
  kSOCS = 0.004;
  SOCSdeg = 0.0025;
  kSOCSon = 1e-6;
  kSOCSoff = 0.00055;

  // Reactions:
  r0: __s0 + __s2 -> __s7; __s0*__s2*ka1 - __s7*kd1;
  r1: __s0 + __s3 -> __s8; __s0*__s3*ka2 - __s8*kd2;
  r2: __s1 + __s2 -> __s9; __s1*__s2*k_a1 - __s9*k_d1;
  r3: __s1 + __s3 -> __s10; __s1*__s3*k_a2 - __s10*k_d2;
  r4: __s5 => __s4; __s5*kpu;
  r5: __s5 => __s5 + __s6; __s5*kSOCS;
  r6: __s6 => ; __s6*SOCSdeg;
  r7: __s3 + __s6 -> __s11; -(__s11*kSOCSoff) + __s3*__s6*kSOCSon;
  r8: __s2 -> __s12; -(2*__s12*krec_a1) - __s12*krec_r1 + __s2*kIntBasal_r1;
  r9: __s3 -> __s13; -(2*__s13*krec_a2) - __s13*krec_r2 + __s3*kIntBasal_r2;
  r10: __s0 + __s11 -> __s14; __s0*__s11*ka2 - __s14*kd2;
  r11: __s1 + __s11 -> __s15; __s1*__s11*k_a2 - __s15*k_d2;
  r12: __s3 + __s7 -> __s16; -(__s16*kd3) + __s3*__s7*ka3;
  r13: __s7 + __s11 -> __s17; __s11*__s7*ka3 - __s17*kd3;
  r14: __s2 + __s8 -> __s16; -(__s16*kd4) + __s2*__s8*ka4;
  r15: __s3 + __s9 -> __s18; -(__s18*k_d3) + __s3*__s9*k_a3;
  r16: __s2 + __s10 -> __s18; __s10*__s2*k_a4 - __s18*k_d4;
  r17: __s6 + __s8 -> __s14; -(__s14*kSOCSoff) + __s6*__s8*kSOCSon;
  r18: __s6 + __s10 -> __s15; __s10*__s6*kSOCSon - __s15*kSOCSoff;
  r19: __s2 + __s14 -> __s17; __s14*__s2*ka4 - __s17*kd4;
  r20: __s2 + __s15 -> __s19; __s15*__s2*k_a4 - __s19*k_d4;
  r21: __s4 + __s16 => __s5 + __s16; __s16*__s4*kpa;
  r22: __s4 + __s18 => __s5 + __s18; __s18*__s4*kpa;
  r23: __s6 + __s16 -> __s17; __s16*__s6*kSOCSon - __s17*kSOCSoff;
  r24: __s6 + __s18 -> __s19; __s18*__s6*kSOCSon - __s19*kSOCSoff;
  r25: __s16 => __s20; __s16*kint_a;
  r26: __s18 => __s21; __s18*kint_b;
  r27: __s21 => __s12 + __s13; __s21*kdeg_b;
  r28: __s20 => __s12 + __s13; __s20*kdeg_a;
end
