// SBML level 2 version 1

model IFN_beta_altSOCS_ppCompatible()

  // Compartments:
  compartment default1 = 1;

  // Species:
  species __s0 in default1 = 6022000000/default1; __s0 is "IFN_beta(r1=None, r2=None)";
  species __s1 in default1 = 2000/default1; __s1 is "IFNAR1(re=None, ri=None, loc='out')";
  species __s2 in default1 = 2000/default1; __s2 is "IFNAR2(re=None, ri=None, loc='out')";
  species __s3 in default1 = 10000/default1; __s3 is "STAT(j='U', loc='Cyt', fdbk=None)";
  species __s4 in default1 = 0; __s4 is "IFNAR1(re=1, ri=None, loc='out') ._br_IFN_beta(r1=1, r2=None)";
  species __s5 in default1 = 0; __s5 is "IFNAR2(re=1, ri=None, loc='out') ._br_IFN_beta(r1=1, r2=None)";
  species __s6 in default1 = 0; __s6 is "IFNAR1(re=1, ri=None, loc='out') ._br_IFNAR2(re=2, ri=None, loc='out') ._br_IFN_beta(r1=1, r2=2)";
  species __s7 in default1 = 0; __s7 is "STAT(j='P', loc='Cyt', fdbk=None)";
  species __s8 in default1 = 0; __s8 is "SOCS(site=None)";
  species __s9 in default1 = 0; __s9 is "IFNAR2(re=None, ri=1, loc='out') ._br_SOCS(site=1)";
  species __s10 in default1 = 0; __s10 is "IFNAR2(re=1, ri=2, loc='out') ._br_IFN_beta(r1=1, r2=None) ._br_SOCS(site=2)";
  species __s11 in default1 = 0; __s11 is "IFNAR1(re=1, ri=None, loc='out') ._br_IFNAR2(re=2, ri=3, loc='out') ._br_IFN_beta(r1=1, r2=2) ._br_SOCS(site=3)";

  // Parameters:
  k_a1 = 4.98e-14;
  k_d1 = 0.03;
  k_a2 = 8.3e-13;
  k_d2 = 0.002;
  k_a3 = 0.000362;
  k_a4 = 0.000362;
  k_d4 = 0.006;
  k_d3 = 2.4e-5;
  kpa = 1e-6;
  kpu = 0.001;
  kSOCS = 0.004;
  SOCSdeg = 0.0025;
  kSOCSon = 1e-6;
  kSOCSoff = 0.00055;

  // Reactions:
  r0: __s0 + __s1 -> __s4; __s0*__s1*k_a1 - __s4*k_d1;
  r1: __s0 + __s2 -> __s5; __s0*__s2*k_a2 - __s5*k_d2;
  r2: __s2 + __s4 -> __s6; __s2*__s4*k_a3 - __s6*k_d3;
  r3: __s1 + __s5 -> __s6; __s1*__s5*k_a4 - __s6*k_d4;
  r4: __s3 + __s6 => __s6 + __s7; __s3*__s6*kpa;
  r5: __s7 => __s3; __s7*kpu;
  r6: __s7 => __s7 + __s8; __s7*kSOCS;
  r7: __s8 => ; __s8*SOCSdeg;
  r8: __s2 + __s8 -> __s9; __s2*__s8*kSOCSon - __s9*kSOCSoff;
  r9: __s5 + __s8 -> __s10; -(__s10*kSOCSoff) + __s5*__s8*kSOCSon;
  r10: __s6 + __s8 -> __s11; -(__s11*kSOCSoff) + __s6*__s8*kSOCSon;
  r11: __s0 + __s9 -> __s10; __s0*__s9*k_a2 - __s10*k_d2;
  r12: __s1 + __s10 -> __s11; __s1*__s10*k_a4 - __s11*k_d4;
end
