// SBML level 2 version 1

model Export_Models()

  // Compartments:
  compartment default1 = 1;

  // Species:
  species __s0 in default1 = 6022000000/default1; __s0 is "IFN_alpha2(r1=None, r2=None)";
  species __s1 in default1 = 2000/default1; __s1 is "IFNAR1(re=None, ri=None, loc='out')";
  species __s2 in default1 = 2000/default1; __s2 is "IFNAR2(re=None, ri=None, rs=None, loc='out')";
  species __s3 in default1 = 10000/default1; __s3 is "STAT(j='U', loc='Cyt', fdbk=None)";
  species __s4 in default1 = 0; __s4 is "IFNAR1(re=1, ri=None, loc='out') ._br_IFN_alpha2(r1=1, r2=None)";
  species __s5 in default1 = 0; __s5 is "IFNAR2(re=1, ri=None, rs=None, loc='out') ._br_IFN_alpha2(r1=1, r2=None)";
  species __s6 in default1 = 0; __s6 is "IFNAR1(re=1, ri=None, loc='out') ._br_IFNAR2(re=2, ri=None, rs=None, loc='out') ._br_IFN_alpha2(r1=1, r2=2)";
  species __s7 in default1 = 0; __s7 is "IFNAR1(re=1, ri=None, loc='out') ._br_IFNAR2(re=2, ri=None, rs=3, loc='out') ._br_IFN_alpha2(r1=1, r2=2) ._br_STAT(j='U', loc='Cyt', fdbk=3)";
  species __s8 in default1 = 0; __s8 is "IFNAR2(re=None, ri=None, rs=1, loc='out') ._br_STAT(j='U', loc='Cyt', fdbk=1)";
  species __s9 in default1 = 0; __s9 is "STAT(j='P', loc='Cyt', fdbk=None)";
  species __s10 in default1 = 0; __s10 is "STAT(j='P', loc='Nuc', fdbk=None)";
  species __s11 in default1 = 0; __s11 is "SOCSmRNA(loc='Nuc', reg=None)";
  species __s12 in default1 = 0; __s12 is "SOCSmRNA(loc='Cyt', reg=None)";
  species __s13 in default1 = 0; __s13 is "SOCS(site=None)";
  species __s14 in default1 = 0; __s14 is "IFNAR1(re=1, ri=None, loc='out') ._br_IFNAR2(re=2, ri=3, rs=None, loc='out') ._br_IFN_alpha2(r1=1, r2=2) ._br_SOCS(site=3)";
  species __s15 in default1 = 0; __s15 is "IFNAR2(re=None, ri=1, rs=None, loc='out') ._br_SOCS(site=1)";
  species __s16 in default1 = 0; __s16 is "IFNAR2(re=1, ri=2, rs=None, loc='out') ._br_IFN_alpha2(r1=1, r2=None) ._br_SOCS(site=2)";

  // Parameters:
  ka1 = 3.321156e-14;
  kd1 = 1;
  ka2 = 4.981734e-13;
  kd2 = 0.015;
  ka4 = 0.0003623188;
  kd4 = 0.3;
  ka3 = 0.0003623188;
  kd3 = 0.0003;
  kSTATbinding = 1e-6;
  kSTATunbinding = 4;
  kpa = 1;
  kpu = 0.001;
  kloc = 0.00125;
  kdeloc = 0.01;
  kSOCSmRNA = 0.001;
  mRNAdeg = 0.0005;
  mRNAtrans = 0.001;
  kSOCS = 0.005;
  SOCSdeg = 0.0025;
  kSOCSon = 0.001;
  kSOCSoff = 0.0005;

  // Reactions:
  r0: __s0 + __s1 -> __s4; __s0*__s1*ka1 - __s4*kd1;
  r1: __s0 + __s2 -> __s5; __s0*__s2*ka2 - __s5*kd2;
  r2: __s2 + __s4 -> __s6; __s2*__s4*ka3 - __s6*kd3;
  r3: __s1 + __s5 -> __s6; __s1*__s5*ka4 - __s6*kd4;
  r4: __s3 + __s6 -> __s7; __s3*__s6*kSTATbinding - __s7*kSTATunbinding;
  r5: __s4 + __s8 -> __s7; -(-(__s4*__s8*ka3) + __s7*kd3);
  r6: __s7 => __s6 + __s9; __s7*kpa;
  r7: __s9 => __s3; __s9*kpu;
  r8: __s9 -> __s10; -(__s10*kdeloc) + __s9*kloc;
  r9: __s10 => __s10 + __s11; __s10*kSOCSmRNA;
  r10: __s11 => __s12; __s11*mRNAtrans;
  r11: __s12 => __s12 + __s13; __s12*kSOCS;
  r12: __s12 => ; __s12*mRNAdeg;
  r13: __s13 => ; __s13*SOCSdeg;
  r14: __s6 + __s13 -> __s14; __s13*__s6*kSOCSon - __s14*kSOCSoff;
  r15: __s4 + __s15 -> __s14; -(__s14*kd3 - __s15*__s4*ka3);
  r16: __s1 + __s16 -> __s14; -(-(__s1*__s16*ka4) + __s14*kd4);
  r17: __s0 + __s15 -> __s16; __s0*__s15*ka2 - __s16*kd2;
end
